# OpenSim document version 30000
MarkerSet:
  Marker metatarsal_r: calcn_r (0.185028 0.0047896 -0.0365476) fixed=true
  Marker heel_r: calcn_r (0.0234774 0.00481156 -0.0403202) fixed=true
  Marker metatarsal_l: calcn_l (0.185028 0.0047896 0.0365476) fixed=true
  Marker heel_l: calcn_l (0.0234774 0.00481156 0.0403202) fixed=true
